*Heading
** Job name: Job-1 Model name: Model-1
** Generated by: Abaqus/CAE 2020
*Preprint, echo=NO, model=NO, history=NO, contact=NO
**
** PARTS
**
*Part, name=plate
*Node
      1,       -28.75,          -5.
      2,       -28.75,         -10.
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*Element, type=CPS4R
  1,   1,   2,  12,  13
  2,  13,  12,   3,   4
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*Nset, nset=Set-1, generate
   1,  122,    1
*Elset, elset=Set-1, generate
   1,  100,    1
** Section: section-steel
*Solid Section, elset=Set-1, material=steel
1.,
*End Part
**
**
** ASSEMBLY
**
*Assembly, name=Assembly
**
*Instance, name=plate-1, part=plate
*End Instance
**
*Nset, nset=Set-1, instance=plate-1
  1,  2, 11, 53, 54, 55, 56, 57, 58, 59
*Elset, elset=Set-1, instance=plate-1
   1,  86,  88,  90,  92,  94,  96,  98, 100
*Nset, nset=Set-2, instance=plate-1
  5,  6,  7, 16, 17, 18, 19, 20, 21, 22
*Elset, elset=Set-2, instance=plate-1, generate
  4,  12,   1
*Elset, elset=_Surf-1_S2, internal, instance=plate-1
  12,  20,  86,  88,  90,  92,  94,  96,  98, 100
*Elset, elset=_Surf-1_S1, internal, instance=plate-1
  1, 21, 22, 23, 24, 25, 26, 27, 28
*Surface, type=ELEMENT, name=Surf-1
_Surf-1_S2, S2
_Surf-1_S1, S1
*End Assembly
**
** MATERIALS
**
*Material, name=steel
*Elastic
210000., 0.3
** ----------------------------------------------------------------
**
** STEP: Step-tension
**
*Step, name=Step-tension, nlgeom=NO
100MPa tension
*Static
1., 1., 1e-05, 1.
**
** BOUNDARY CONDITIONS
**
** Name: BC-1 Type: Symmetry/Antisymmetry/Encastre
*Boundary
Set-1, XSYMM
** Name: BC-2 Type: Symmetry/Antisymmetry/Encastre
*Boundary
Set-2, YSYMM
**
** LOADS
**
** Name: Load-tension   Type: Pressure
*Dsload
Surf-1, P, -100.
**
** OUTPUT REQUESTS
**
*Restart, write, frequency=0
**
** FIELD OUTPUT: F-Output-1
**
*Output, field, variable=PRESELECT
**
** HISTORY OUTPUT: H-Output-1
**
*Output, history, variable=PRESELECT
*End Step
